// COMSOL Multiphysics 5.1.0.234 model "GEM_Comsol_Garfield.mph"
// Outline of the model tree

Variables
  var1 "Variables 1"
    Vdrift = 200
    Vgem = 300
    Vind = 200

Geometry
  geom1 "Geometry 1" (3D, length unit mm)
    blk1: Block | pos = {-0.07, -0.07, -1.0}; size = {0.07*sqrt(3), 0.07, 2.0}
    cone1: Cone | pos = {-0.07, -0.07, 0}; r = 0.05/2; h = 0.025; specifytop = radius; rtop = 0.07/2
    cone2: Cone | pos = {-0.07, -0.07, -.025}; r = 0.07/2; h = 0.025; specifytop = radius; rtop = 0.05/2
    cyl1: Cylinder | pos = {-0.07, -0.07, -0.03}; r = 0.08/2; h = 0.005
    cyl2: Cylinder | pos = {-0.07, -0.07, 0.025}; r = 0.08/2; h = 0.005
    mov1: Move | input = cone1, cone2, cyl1, cyl2; keep = on; displx = 0.07*sqrt(3); disply = 0.07
    blk2: Block | pos = {-0.07, -0.07, -0.03}; size = {0.07*sqrt(3), 0.07, 0.005}
    blk3: Block | pos = {-0.07, -0.07, 0.025}; size = {0.07*sqrt(3), 0.07, 0.005}
    uni5: Union | input = blk2, blk3; intbnd = off; face = all
    uni1: Union | input = cone1, cone2, cyl1, cyl2, mov1; intbnd = off; face = all
    dif3: Difference | input = uni5; input2 = uni1; keep = on; intbnd = off; face = all
    del4: Delete "Delete Entities 4" | input = uni5(1) domains 1, 2
    blk8: Block | pos = {-0.07, -0.07, -0.025}; size = {0.07*sqrt(3), 0.07, 0.05}
    dif6: Difference | input = blk8; input2 = uni1; keep = on; intbnd = off; face = all
    del7: Delete "Delete Entities 7" | input = blk8(1) domains 1
    dif4: Difference | input = blk1; input2 = dif3(1); keep = on; intbnd = off; face = all
    del11: Delete "Delete Entities 11" | input = blk1
    int3: Intersection | input = dif4, uni1; keep = on; intbnd = off; face = all
    del8: Delete "Delete Entities 8" | input = uni1(1) domains 1, 2
    del10: Delete "Delete Entities 10" | input = int3(1) domains 1, 2
    dif7: Difference | input = dif4; input2 = dif6; keep = on; intbnd = off; face = all
    del6: Delete "Delete Entities 6" | input = dif4(1) domains 1
    rot1: Rotate | input = dif3, dif6, dif7; rot = 90
    mov2: Move | input = rot1; displx = -0.07; disply = 0.07*sqrt(3)/2
    mir1: Mirror | input = mov2; pos = {0, 0, 0}; axis = {1, 0, 0}
    fin: Finalize "Form Union"

Materials
  mat1: Common "Air" on all domains
    def "Basic"
      relpermeability = 1
      relpermittivity = 1
      dynamicviscosity = eta(T[1/K])[Pa*s]
      ratioofspecificheat = 1.4
      electricconductivity = 0[S/m]
      heatcapacity = Cp(T[1/K])[J/(kg*K)]
      density = rho(pA[1/Pa],T[1/K])[kg/m^3]
      thermalconductivity = k(T[1/K])[W/(m*K)]
      soundspeed = cs(T[1/K])[m/s]
      eta: Piecewise | arg = T; pieces = {200.0, 1600.0, -8.38278E-7+8.35717342E-8*T^1-7.69429583E-11*T^2+4.6437266E-14*T^3-1.06585607E-17*T^4}
      Cp: Piecewise | arg = T; pieces = {200.0, 1600.0, 1047.63657-0.372589265*T^1+9.45304214E-4*T^2-6.02409443E-7*T^3+1.2858961E-10*T^4}
      rho: Analytic | expr = pA*0.02897/8.314/T; args = {pA, T}; dermethod = manual; argders = {{pA, d(pA*0.02897/8.314/T,pA)}, {T, d(pA*0.02897/8.314/T,T)}}
      k: Piecewise | arg = T; pieces = {200.0, 1600.0, -0.00227583562+1.15480022E-4*T^1-7.90252856E-8*T^2+4.11702505E-11*T^3-7.43864331E-15*T^4}
      cs: Analytic | expr = sqrt(1.4*287*T); args = T; dermethod = manual; argders = {T, d(sqrt(1.4*287*T),T)}
    RefractiveIndex
      n = 1
      ki = 0
  mat2: Common "PCB" on domains 2
    def "Basic"
      CTE = CTE(T[1/K])[1/K]
      relpermittivity = 4
      CTE: Piecewise | arg = T; pieces = {80.0, 380.0, 9.741443E-6+2.13708E-7*T^1-5.225347E-10*T^2+4.893412E-13*T^3}
  mat3: Common "Copper" on domains 3, 4
    def "Basic"
      relpermeability = 1
      electricconductivity = 5.998e7[S/m]
      heatcapacity = 385[J/(kg*K)]
      relpermittivity = 1
      emissivity = 0.5
      density = 8700[kg/m^3]
      thermalconductivity = 400[W/(m*K)]
    linzRes "Linearized resistivity"
      rho0 = 1.72e-8[ohm*m]
      alpha = 3.9e-3[1/K]
      Tref = 273.15[K]

Physics
  es: Electrostatics on all domains
    dependent variable V
    ccn1: ChargeConservation (default)
    zc1: ZeroCharge (default)
    init1: init "Initial Values 1" (default)
    pot6: ElectricPotential on boundaries 3 | V0 = 350
    pot1: ElectricPotential on boundaries 11-13, 23 | V0 = 150
    pot2: ElectricPotential on boundaries 15-17, 25 | V0 = -150
    pot5: ElectricPotential on boundaries 4 | V0 = -200

Mesh
  mesh1 "Mesh 1"
    size: MeshSizeDefault | hauto = 1
    ftet1: FreeTet "Free Tetrahedral 1" on remaining entities
      size1: Size on domains 1 | hauto = 2
      size2: Size on domains 2-4 | hauto = 9
      prob1: MeshProblem "Problems 1"
        warning1: MeshWarning "Warning 1" on edges 25, 29, 59, 63
        warning2: MeshWarning "Warning 2" on boundaries 5, 10, 13, 14, 16, 19, 21, 22, 29, 30, 32, 34

Studies
  std1 "Study 1"
    stat: Stationary

Solver configurations
  sol1 "Solution 1" (study std1)
    v1: Variables "Dependent Variables 1"
    s1: Stationary "Stationary Solver 1"
      fc1: FullyCoupled
      i1: Iterative | linsolver = cg
        mg1: Multigrid | prefun = amg

Datasets
  dset1: Solution | solution = sol1

Plots
  pg1: PlotGroup3D "Electric Potential (es)" | data = dset1
    mslc1: Multislice | expr = V
  pg2: PlotGroup3D "Electric Field" | data = dset1
    str1: Streamline (disabled) | expr = {es.Ex, es.Ey, es.Ez}; selnumber = 200
    surf1: Surface (disabled) | expr = V
    slc1: Slice (disabled) | expr = es.normE; unit = V/m; quickxnumber = 1; genpoints = {{0, 0, 0}, {1, 0, 0}, {0, 1, 0}}
    str2: Streamline | expr = {es.Ex, es.Ey, es.Ez}
    surf2: Surface | expr = es.normE; unit = V/m

Exports
  mesh1: Mesh | data = dset1; type3D = mphascii; filename = H:\NUMEN\gas tracker\meshfileGarfield2_1_light.mphtxt
  data1: Data
    data = dset1
    expr = V
    unit = V
    descr = Electric potential
    filename = H:\NUMEN\gas tracker\fieldmapGarfield2_1_light.txt
    lagorder = 2